simulations SweetCornValidation: version=2
  simulation NZIrrigation
    clock
      start_date = 30/10/1991  # Select the start date of the simulation
      end_date = 31/12/1992  # Select the end date of the simulation
    summaryfile: filename=NZIrrigation.sum
    metfile met: filename=D:\development\apsim\SweetCorn\Validation\Lincoln9192.met
    area FI
      registrations global
      fertiliser
      surfaceom surface organic matter
        PoolName = wheat  # Organic Matter pool name
        type = wheat  # Organic Matter type
        mass = 10  # Initial surface residue (kg/ha)
        cnr = 80.0  # C:N ration of initial residue
        standing_fraction = 0.0  # Fraction of residue standing
      SweetCorn
      outputfile: filename=NZIrrigation FI.out
        outputfiledescription My Variables
          variables
            variables: Date, zadok_stage, lai, leaf_wt, stem_wt, head_wt, biomass_wt
          events: event=global.Daily
      irrigation
        automatic_irrigation = on  # switch
        asw_depth = 600.0  # Depth to which ASW is calculated. (mm)
        crit_fr_asw = 0.5  # Fraction of ASW below which irrigation is applied (0-1.0)
        irrigation_efficiency = 1.0  # Efficiency of the irrigation. (0-1.0)
      soil Lincoln: Site=Lincoln; Region=NZ; SoilType=Templeton Sandy Loam; NearestTown=Lincoln
        Water: Cona=3.5; DiffusConst=40; DiffusSlope=16; U=6; Salb=0.13; Cn2Bare=73; CnRed=20; CnCov=0.8
          layer:
            thickness  bd    ll15  airdry  dul   sat   sw       swcon
            150        1.32  0.26  0.13    0.41  0.47  9999.99  0.3
            150        1.3   0.26  0.234   0.43  0.48  9999.99  0.3
            300        1.23  0.26  0.26    0.46  0.51  9999.99  0.3
            300        1.27  0.26  0.26    0.44  0.49  9999.99  0.3
            300        1.37  0.25  0.25    0.4   0.45  9999.99  0.3
            300        1.35  0.28  0.28    0.41  0.46  9999.99  0.3
            300        1.35  0.31  0.31    0.38  0.46  9999.99  0.3
        Nitrogen: CnCanopyFact=1; RootCn=40; RootWt=200; SoilCn=12.5; EnrACoeff=7.4; EnrBCoeff=0.2
          layer:
            fbiom  finert  no3  nh4  oc    ph
            0.03   0.4     6.5  0.6  1.24  7
            0.02   0.6     2.1  0.1  1.24  7
            0.01   0.8     2.1  0.1  1.25  7
            0.01   0.9     1.7  0.1  1.1   7
            0.01   0.95    1.7  0.1  0.71  7
            0.01   0.95    1.7  0.1  0.34  7
            0.01   0.95    1.7  0.1  0.26  7
        InitWater
          PercentMethod: Percent=0.83; Distributed=Filled from top
        InitNitrogen
          layer:
            no3      nh4
            6.49399  0.608229
            2.09806  0.101371
            2.09806  0.101371
            1.69843  0.101371
            1.69843  0.101371
            1.69843  0.101371
            1.69843  0.101371
        SoilCrop SweetCorn
          layer:
            ll    kl    xf
            0.26  0.1   1
            0.26  0.1   1
            0.26  0.08  1
            0.26  0.06  1
            0.25  0.04  1
            0.29  0.02  1
            0.38  0.01  1
      manager LincolnCrop
        rule Harvesting rule
          condition end_of_day:
            if [crop].stage_name = 'harvest_ripe' or [crop].plant_status = 'dead' then
                          [crop]  harvest
                          [crop]  end_crop
                       endif
          category Harvesting criteria
        rule Sowing fertiliser
          condition [modulename].[eventname]=[fertmodule] apply amount = [fert_amount_sow] (kg/ha), depth = 50 (mm), type = [fert_type_sow]
          category When should fertiliser be applied
          category Fertiliser application details
        rule Sow on a fixed date
          condition start_of_day:
            if (today = date('[date]') then
                                [crop] sow plants =[density], sowing_depth = [depth], cultivar = [cultivar], row_spacing = [row_spacing]
                    endif
          category Sowing criteria
          category Sowing parameters
        rule Fertilise on fixed date
          condition start_of_day:
            if (today = date('[fert_date]') then
                        N_topsoil = no3(1) + nh4(1) + no3(2) + nh4(2)
                        if (N_topsoil < [fert_criteria]) then
                           [fertmodule] apply amount = [fert_amount] (kg/ha), depth = 50 (mm), type = [fert_type] ()
                        endif
                     endif
          category When should fertiliser be applied
          category Fertiliser application details
    log: debugoutput=on; filename=log.txt
    area FD
      registrations global
      fertiliser
      surfaceom surface organic matter
        PoolName = wheat  # Organic Matter pool name
        type = wheat  # Organic Matter type
        mass = 10  # Initial surface residue (kg/ha)
        cnr = 80.0  # C:N ration of initial residue
        standing_fraction = 0.0  # Fraction of residue standing
      SweetCorn
      outputfile: filename=NZIrrigation FD.out
        outputfiledescription My Variables
          variables
            variables: Date, zadok_stage, lai, leaf_wt, stem_wt, head_wt, biomass_wt
          events: event=global.Daily
      irrigation
        automatic_irrigation = on  # switch
        asw_depth = 600.0  # Depth to which ASW is calculated. (mm)
        crit_fr_asw = 0.5  # Fraction of ASW below which irrigation is applied (0-1.0)
        irrigation_efficiency = 1.0  # Efficiency of the irrigation. (0-1.0)
      soil Lincoln: same as NZIrrigation.FI.Lincoln
      manager LincolnCrop: same as NZIrrigation.FI.LincolnCrop
  folder shared
    soil Lincoln: Site=UQ, Lawes; Region=Lockyer; SoilType=Black Vertosol; NearestTown=Gatton, Q 4343; NaturalVegetation=Blue Gum, Moreton Bay Ash, Tea Tree; Comment=oc and ph not measured
      Water: same as NZIrrigation.FI.Lincoln.Water
      Nitrogen: same as NZIrrigation.FI.Lincoln.Nitrogen
      InitWater
        PercentMethod: Percent=0.83; Distributed=Filled from top
      InitNitrogen: same as NZIrrigation.FI.Lincoln.InitNitrogen
      SoilCrop SweetCorn
        layer:
          ll    kl    xf
          0.26  0.1   1
          0.26  0.1   1
          0.26  0.08  1
          0.26  0.06  1
          0.25  0.04  1
          0.29  0.02  1
          0.38  0.01  1
    manager LincolnCrop: same as NZIrrigation.FI.LincolnCrop
