simulations untitled: version=4
  simulation GreenBelt1997
    clock
      start_date = 1/03/1997  # Select the start date of the simulation
      end_date = 10/11/1997  # Select the end date of the simulation
    summaryfile: filename=GreenBelt1997.sum
    metfile met: filename=D:\development\apsim\Broccoli\Validation\DPI9798.met
    area Planting1
      registrations global
      manager
        rule Sowing fertiliser
          condition [modulename].[eventname]=[fertmodule] apply amount = [fert_amount_sow] (kg/ha), depth = 50 (mm), type = [fert_type_sow]
          category When should fertiliser be applied
            modulename = broccoli  # On which module should the event come from
            eventname = sowing  # On which event should fertiliser be applied
          category Fertiliser application details
            fertmodule = fertiliser  # Module used to apply the fertiliser
            fert_amount_sow = 300  # Amount of starter fertiliser at sowing (kg/ha)
            fert_type_sow = NO3_N  # Sowing fertiliser type
        rule Sow on a fixed date
          condition start_of_day:
            if (today = date('[date]') then
                                [crop] sow plants =[density], sowing_depth = [depth], cultivar = [cultivar], row_spacing = [row_spacing]
                    endif
          category Sowing criteria
            date = 11-mar  # Enter sowing date (dd-mmm)
          category Sowing parameters
            crop = broccoli  # Enter name of crop to sow
            density = 6  # Enter sowing density (plants/m2)
            depth = 50  # Enter sowing depth (mm)
            cultivar = greenbelt  # Enter cultivar
            row_spacing = 600  # Enter row spacing (mm)
        rule Harvest on a Growth Stage
          condition start_of_day:
            if ([crop].stage_name = '[stage]') then
                                [crop] harvest
                                [crop] end_crop
                    endif
          category Harvesting criteria
            stage = maturity  # Enter stage name
          category Harvesting parameters
            crop = broccoli  # Enter name of crop to sow
        rule Irrigate at sowing
          condition [modulename].[eventname]:
            if ([irrig_amount_evt] > 0) then
                        '[irrigatemodule]' apply amount = [irrig_amount_evt] (mm)
                     endif
          category When should irrigation be applied
            modulename = broccoli  # The module the event come from
            eventname = sowing  # Which event should irrigation be applied
          category Irrigation application details
            irrigatemodule = Irrigation  # Module used to apply the irrigation
            irrig_amount_evt = 50  # Amount of irrigation to apply (mm)
      fertiliser
      surfaceom surface organic matter
        PoolName = wheat  # Organic Matter pool name
        type = wheat  # Organic Matter type
        mass = 1000.  # Initial surface residue (kg/ha)
        cnr = 80.0  # C:N ration of initial residue
        standing_fraction = 0.0  # Fraction of residue standing
      outputfile: filename=GreenBelt1997 Planting1.out
        outputfiledescription -> My Variables
      broccoli
      outputfile final: filename=GreenBelt1997 Planting1 final.out
        outputfiledescription -> FinalVariables
      irrigation
        automatic_irrigation = on  # switch
        asw_depth = 600.0  # Depth to which ASW is calculated. (mm)
        crit_fr_asw = 0.5  # Fraction of ASW below which irrigation is applied (0-1.0)
        irrigation_efficiency = 1.0  # Efficiency of the irrigation. (0-1.0)
      Soil -> LawesSoil
    area Planting2
      registrations global
      manager
        rule Sowing fertiliser: same as GreenBelt1997.Planting1.Manager.Sowing fertiliser
        rule Sow on a fixed date
          condition start_of_day:
            if (today = date('[date]') then
                                [crop] sow plants =[density], sowing_depth = [depth], cultivar = [cultivar], row_spacing = [row_spacing]
                    endif
          category Sowing criteria
            date = 20-mar  # Enter sowing date (dd-mmm)
          category Sowing parameters
            crop = broccoli  # Enter name of crop to sow
            density = 6  # Enter sowing density (plants/m2)
            depth = 50  # Enter sowing depth (mm)
            cultivar = greenbelt  # Enter cultivar
            row_spacing = 600  # Enter row spacing (mm)
        rule Irrigate at sowing: same as GreenBelt1997.Planting1.Manager.Irrigate at sowing
        rule Harvest on a Growth Stage: same as GreenBelt1997.Planting1.Manager.Harvest on a Growth Stage
      fertiliser
      surfaceom surface organic matter
        PoolName = wheat  # Organic Matter pool name
        type = wheat  # Organic Matter type
        mass = 1000.  # Initial surface residue (kg/ha)
        cnr = 80.0  # C:N ration of initial residue
        standing_fraction = 0.0  # Fraction of residue standing
      broccoli
      outputfile final: filename=GreenBelt1997 Planting2 final.out
        outputfiledescription -> FinalVariables
      outputfile: filename=GreenBelt1997 Planting2.out
        outputfiledescription -> My Variables
      irrigation
        automatic_irrigation = on  # switch
        asw_depth = 600.0  # Depth to which ASW is calculated. (mm)
        crit_fr_asw = 0.5  # Fraction of ASW below which irrigation is applied (0-1.0)
        irrigation_efficiency = 1.0  # Efficiency of the irrigation. (0-1.0)
      Soil -> LawesSoil
    area Planting3
      registrations global
      manager
        rule Sowing fertiliser: same as GreenBelt1997.Planting1.Manager.Sowing fertiliser
        rule Sow on a fixed date
          condition start_of_day:
            if (today = date('[date]') then
                                [crop] sow plants =[density], sowing_depth = [depth], cultivar = [cultivar], row_spacing = [row_spacing]
                    endif
          category Sowing criteria
            date = 1-apr  # Enter sowing date (dd-mmm)
          category Sowing parameters
            crop = broccoli  # Enter name of crop to sow
            density = 6  # Enter sowing density (plants/m2)
            depth = 50  # Enter sowing depth (mm)
            cultivar = greenbelt  # Enter cultivar
            row_spacing = 600  # Enter row spacing (mm)
        rule Irrigate at sowing: same as GreenBelt1997.Planting1.Manager.Irrigate at sowing
        rule Harvest on a Growth Stage: same as GreenBelt1997.Planting1.Manager.Harvest on a Growth Stage
      fertiliser
      surfaceom surface organic matter
        PoolName = wheat  # Organic Matter pool name
        type = wheat  # Organic Matter type
        mass = 1000.  # Initial surface residue (kg/ha)
        cnr = 80.0  # C:N ration of initial residue
        standing_fraction = 0.0  # Fraction of residue standing
      broccoli
      outputfile final: filename=GreenBelt1997 Planting3 final.out
        outputfiledescription -> FinalVariables
      outputfile: filename=GreenBelt1997 Planting3.out
        outputfiledescription -> My Variables
      irrigation
        automatic_irrigation = on  # switch
        asw_depth = 600.0  # Depth to which ASW is calculated. (mm)
        crit_fr_asw = 0.5  # Fraction of ASW below which irrigation is applied (0-1.0)
        irrigation_efficiency = 1.0  # Efficiency of the irrigation. (0-1.0)
      Soil -> LawesSoil
    area Planting4
      registrations global
      manager
        rule Sowing fertiliser: same as GreenBelt1997.Planting1.Manager.Sowing fertiliser
        rule Sow on a fixed date
          condition start_of_day:
            if (today = date('[date]') then
                                [crop] sow plants =[density], sowing_depth = [depth], cultivar = [cultivar], row_spacing = [row_spacing]
                    endif
          category Sowing criteria
            date = 10-apr  # Enter sowing date (dd-mmm)
          category Sowing parameters
            crop = broccoli  # Enter name of crop to sow
            density = 6  # Enter sowing density (plants/m2)
            depth = 50  # Enter sowing depth (mm)
            cultivar = greenbelt  # Enter cultivar
            row_spacing = 600  # Enter row spacing (mm)
        rule Irrigate at sowing: same as GreenBelt1997.Planting1.Manager.Irrigate at sowing
        rule Harvest on a Growth Stage: same as GreenBelt1997.Planting1.Manager.Harvest on a Growth Stage
      fertiliser
      surfaceom surface organic matter
        PoolName = wheat  # Organic Matter pool name
        type = wheat  # Organic Matter type
        mass = 1000.  # Initial surface residue (kg/ha)
        cnr = 80.0  # C:N ration of initial residue
        standing_fraction = 0.0  # Fraction of residue standing
      broccoli
      outputfile final: filename=GreenBelt1997 Planting4 final.out
        outputfiledescription -> FinalVariables
      outputfile: filename=GreenBelt1997 Planting4.out
        outputfiledescription -> My Variables
      irrigation
        automatic_irrigation = on  # switch
        asw_depth = 600.0  # Depth to which ASW is calculated. (mm)
        crit_fr_asw = 0.5  # Fraction of ASW below which irrigation is applied (0-1.0)
        irrigation_efficiency = 1.0  # Efficiency of the irrigation. (0-1.0)
      Soil -> LawesSoil
    area Planting5
      registrations global
      manager
        rule Sowing fertiliser: same as GreenBelt1997.Planting1.Manager.Sowing fertiliser
        rule Sow on a fixed date
          condition start_of_day:
            if (today = date('[date]') then
                                [crop] sow plants =[density], sowing_depth = [depth], cultivar = [cultivar], row_spacing = [row_spacing]
                    endif
          category Sowing criteria
            date = 21-apr  # Enter sowing date (dd-mmm)
          category Sowing parameters
            crop = broccoli  # Enter name of crop to sow
            density = 6  # Enter sowing density (plants/m2)
            depth = 50  # Enter sowing depth (mm)
            cultivar = greenbelt  # Enter cultivar
            row_spacing = 600  # Enter row spacing (mm)
        rule Irrigate at sowing: same as GreenBelt1997.Planting1.Manager.Irrigate at sowing
        rule Harvest on a Growth Stage: same as GreenBelt1997.Planting1.Manager.Harvest on a Growth Stage
      fertiliser
      surfaceom surface organic matter
        PoolName = wheat  # Organic Matter pool name
        type = wheat  # Organic Matter type
        mass = 1000.  # Initial surface residue (kg/ha)
        cnr = 80.0  # C:N ration of initial residue
        standing_fraction = 0.0  # Fraction of residue standing
      broccoli
      outputfile final: filename=GreenBelt1997 Planting5 final.out
        outputfiledescription -> FinalVariables
      outputfile: filename=GreenBelt1997 Planting5.out
        outputfiledescription -> My Variables
      irrigation
        automatic_irrigation = on  # switch
        asw_depth = 600.0  # Depth to which ASW is calculated. (mm)
        crit_fr_asw = 0.5  # Fraction of ASW below which irrigation is applied (0-1.0)
        irrigation_efficiency = 1.0  # Efficiency of the irrigation. (0-1.0)
      Soil -> LawesSoil
    area Planting6
      registrations global
      manager
        rule Sowing fertiliser: same as GreenBelt1997.Planting1.Manager.Sowing fertiliser
        rule Sow on a fixed date
          condition start_of_day:
            if (today = date('[date]') then
                                [crop] sow plants =[density], sowing_depth = [depth], cultivar = [cultivar], row_spacing = [row_spacing]
                    endif
          category Sowing criteria
            date = 1-may  # Enter sowing date (dd-mmm)
          category Sowing parameters
            crop = broccoli  # Enter name of crop to sow
            density = 6  # Enter sowing density (plants/m2)
            depth = 50  # Enter sowing depth (mm)
            cultivar = greenbelt  # Enter cultivar
            row_spacing = 600  # Enter row spacing (mm)
        rule Irrigate at sowing: same as GreenBelt1997.Planting1.Manager.Irrigate at sowing
        rule Harvest on a Growth Stage: same as GreenBelt1997.Planting1.Manager.Harvest on a Growth Stage
      fertiliser
      surfaceom surface organic matter
        PoolName = wheat  # Organic Matter pool name
        type = wheat  # Organic Matter type
        mass = 1000.  # Initial surface residue (kg/ha)
        cnr = 80.0  # C:N ration of initial residue
        standing_fraction = 0.0  # Fraction of residue standing
      broccoli
      outputfile final: filename=GreenBelt1997 Planting6 final.out
        outputfiledescription -> FinalVariables
      outputfile: filename=GreenBelt1997 Planting6.out
        outputfiledescription -> My Variables
      irrigation
        automatic_irrigation = on  # switch
        asw_depth = 600.0  # Depth to which ASW is calculated. (mm)
        crit_fr_asw = 0.5  # Fraction of ASW below which irrigation is applied (0-1.0)
        irrigation_efficiency = 1.0  # Efficiency of the irrigation. (0-1.0)
      Soil -> LawesSoil
    area Planting7
      registrations global
      manager
        rule Sowing fertiliser: same as GreenBelt1997.Planting1.Manager.Sowing fertiliser
        rule Sow on a fixed date
          condition start_of_day:
            if (today = date('[date]') then
                                [crop] sow plants =[density], sowing_depth = [depth], cultivar = [cultivar], row_spacing = [row_spacing]
                    endif
          category Sowing criteria
            date = 12-may  # Enter sowing date (dd-mmm)
          category Sowing parameters
            crop = broccoli  # Enter name of crop to sow
            density = 6  # Enter sowing density (plants/m2)
            depth = 50  # Enter sowing depth (mm)
            cultivar = greenbelt  # Enter cultivar
            row_spacing = 600  # Enter row spacing (mm)
        rule Irrigate at sowing: same as GreenBelt1997.Planting1.Manager.Irrigate at sowing
        rule Harvest on a Growth Stage: same as GreenBelt1997.Planting1.Manager.Harvest on a Growth Stage
      fertiliser
      surfaceom surface organic matter
        PoolName = wheat  # Organic Matter pool name
        type = wheat  # Organic Matter type
        mass = 1000.  # Initial surface residue (kg/ha)
        cnr = 80.0  # C:N ration of initial residue
        standing_fraction = 0.0  # Fraction of residue standing
      broccoli
      outputfile final: filename=GreenBelt1997 Planting7 final.out
        outputfiledescription -> FinalVariables
      outputfile: filename=GreenBelt1997 Planting7.out
        outputfiledescription -> My Variables
      irrigation
        automatic_irrigation = on  # switch
        asw_depth = 600.0  # Depth to which ASW is calculated. (mm)
        crit_fr_asw = 0.5  # Fraction of ASW below which irrigation is applied (0-1.0)
        irrigation_efficiency = 1.0  # Efficiency of the irrigation. (0-1.0)
      Soil -> LawesSoil
    area Planting8
      registrations global
      manager
        rule Sowing fertiliser: same as GreenBelt1997.Planting1.Manager.Sowing fertiliser
        rule Sow on a fixed date
          condition start_of_day:
            if (today = date('[date]') then
                                [crop] sow plants =[density], sowing_depth = [depth], cultivar = [cultivar], row_spacing = [row_spacing]
                    endif
          category Sowing criteria
            date = 22-may  # Enter sowing date (dd-mmm)
          category Sowing parameters
            crop = broccoli  # Enter name of crop to sow
            density = 6  # Enter sowing density (plants/m2)
            depth = 50  # Enter sowing depth (mm)
            cultivar = greenbelt  # Enter cultivar
            row_spacing = 600  # Enter row spacing (mm)
        rule Irrigate at sowing: same as GreenBelt1997.Planting1.Manager.Irrigate at sowing
        rule Harvest on a Growth Stage: same as GreenBelt1997.Planting1.Manager.Harvest on a Growth Stage
      fertiliser
      surfaceom surface organic matter
        PoolName = wheat  # Organic Matter pool name
        type = wheat  # Organic Matter type
        mass = 1000.  # Initial surface residue (kg/ha)
        cnr = 80.0  # C:N ration of initial residue
        standing_fraction = 0.0  # Fraction of residue standing
      broccoli
      outputfile final: filename=GreenBelt1997 Planting8 final.out
        outputfiledescription -> FinalVariables
      outputfile: filename=GreenBelt1997 Planting8.out
        outputfiledescription -> My Variables
      irrigation
        automatic_irrigation = on  # switch
        asw_depth = 600.0  # Depth to which ASW is calculated. (mm)
        crit_fr_asw = 0.5  # Fraction of ASW below which irrigation is applied (0-1.0)
        irrigation_efficiency = 1.0  # Efficiency of the irrigation. (0-1.0)
      Soil -> LawesSoil
    log: debugoutput=off; filename=log.txt
  simulation Mulgowie2005
    clock
      start_date = Select the start date of the simulation  # Select the start date of the simulation
      end_date = 10/11/2005  # Select the end date of the simulation
    summaryfile: filename=Mulgowie2005.sum
    metfile met: filename=D:\development\apsim\Broccoli\Validation\UQG2005.met
    area Planting1
      registrations global
      manager: same as GreenBelt1997.Planting1.Manager
      fertiliser
      surfaceom surface organic matter
        PoolName = wheat  # Organic Matter pool name
        type = wheat  # Organic Matter type
        mass = 1000.  # Initial surface residue (kg/ha)
        cnr = 80.0  # C:N ration of initial residue
        standing_fraction = 0.0  # Fraction of residue standing
      soil -> #037 - UQ, Lawes,Black Vertosol
      outputfile: filename=Mulgowie2005 Planting1.out
        outputfiledescription My Variables
          variables
            variables: Date, biomass_wt, leaf_no, lai, floral_initiation_das, maturity_das, stage, cum_vernal_days, tt_tot, dlt_cumvd
          events: event=global.Daily
      irrigation
        automatic_irrigation = on  # switch
        asw_depth = 300.0  # Depth to which ASW is calculated. (mm)
        crit_fr_asw = 0.5  # Fraction of ASW below which irrigation is applied (0-1.0)
        irrigation_efficiency = 1.0  # Efficiency of the irrigation. (0-1.0)
      broccoli
      outputfile final: filename=Mulgowie2005 Planting1 final.out
        outputfiledescription My Variables
          variables
            variables: sowing_date, dd/mm/yyyy, floral_initiation_das, maturity_das, green_biomass_wt, pod_wt, leaf_no
          events: event=broccoli.harvesting
    log: debugoutput=off; filename=log.txt
  simulation Lawes06
    clock
      start_date = 1/01/2006  # Select the start date of the simulation
      end_date = 17/07/2006  # Select the end date of the simulation
    summaryfile: filename=Lawes06.sum
    metfile met: filename=D:\development\apsim\Broccoli\Validation\DPI2006.met
    area Planting1Wet
      registrations global
      manager
        rule Sowing fertiliser: same as GreenBelt1997.Planting1.Manager.Sowing fertiliser
        rule Sow on a fixed date
          condition start_of_day:
            if (today = date('[date]') then
                                [crop] sow plants =[density], sowing_depth = [depth], cultivar = [cultivar], row_spacing = [row_spacing]
                    endif
          category Sowing criteria
            date = 14-mar  # Enter sowing date (dd-mmm)
          category Sowing parameters
            crop = broccoli  # Enter name of crop to sow
            density = 4  # Enter sowing density (plants/m2)
            depth = 50  # Enter sowing depth (mm)
            cultivar = greenbelt  # Enter cultivar
            row_spacing = 600  # Enter row spacing (mm)
        rule Harvest on a Growth Stage: same as GreenBelt1997.Planting1.Manager.Harvest on a Growth Stage
        rule Irrigate at sowing: same as GreenBelt1997.Planting1.Manager.Irrigate at sowing
      fertiliser
      surfaceom surface organic matter
        PoolName = wheat  # Organic Matter pool name
        type = wheat  # Organic Matter type
        mass = 1000.  # Initial surface residue (kg/ha)
        cnr = 80.0  # C:N ration of initial residue
        standing_fraction = 0.0  # Fraction of residue standing
      outputfile: filename=Lawes06 Planting1Wet.out
        outputfiledescription -> My Variables
      broccoli
      outputfile final: filename=Lawes06 Planting1Wet final.out
        outputfiledescription -> FinalVariables
      irrigation
        automatic_irrigation = on  # switch
        asw_depth = 600.0  # Depth to which ASW is calculated. (mm)
        crit_fr_asw = 0.5  # Fraction of ASW below which irrigation is applied (0-1.0)
        irrigation_efficiency = 1.0  # Efficiency of the irrigation. (0-1.0)
      Soil -> DPIGatton
    log: debugoutput=off; filename=log.txt
  folder shared
    Soil #037 - UQ, Lawes,Black Vertosol: region=Lockyer; site=UQ, Lawes; SoilType=Black Vertosol; nearesttown=Gatton, Q 4343; comment=oc and ph estimated; naturalvegetation=Blue Gum, Moreton Bay Ash, Tea Tree; WaterFormat=VolumetricPercent
      Water: U=6; Cona=3.5; Salb=0.13; DiffusConst=40; DiffusSlope=16; CN2Bare=73; CNRed=20; CNCov=0.8
        layer:
          thickness  bd    ll15  airdry  dul   sat   swcon
          150        1.32  0.26  0.13    0.41  0.47  0.3
          150        1.3   0.26  0.234   0.43  0.48  0.3
          300        1.23  0.26  0.26    0.46  0.51  0.3
          300        1.27  0.26  0.26    0.44  0.49  0.3
          300        1.37  0.25  0.25    0.4   0.45  0.3
          300        1.35  0.28  0.28    0.41  0.46  0.3
          300        1.35  0.31  0.31    0.38  0.46  0.3
      Nitrogen: RootCN=40; RootWT=200; SoilCN=12.5; EnrACoeff=7.4; EnrBCoeff=0.2
        layer:
          fbiom  finert  oc    ph
          0.03   0.4     1.24  7
          0.02   0.6     1.24  7
          0.01   0.8     1.25  7
          0.01   0.9     1.1   7
          0.01   0.95    0.71  7
          0.01   0.95    0.34  7
          0.01   0.95    0.26  7
      InitWater
        sw=[0.41, 0.43, 0.46, 0.44, 0.4, 0.41, 0.38]
      other
      InitNitrogen
        layer:
          no3  nh4
          6.5  0.6
          2.1  0.1
          2.1  0.1
          1.7  0.1
          1.7  0.1
          1.7  0.1
          1.7  0.1
      SoilCrop wheat
        layer:
          ll    kl    xf
          0.26  0.1   1
          0.26  0.1   1
          0.26  0.08  1
          0.26  0.06  1
          0.25  0.04  1
          0.29  0.02  1
          0.36  0.01  1
      SoilCrop canola
        layer:
          ll    kl    xf
          0.26  0.1   1
          0.3   0.1   1
          0.39  0.08  1
          0.36  0.06  1
          0.31  0.04  1
          0.28  0.02  1
          0.32  0.01  1
      SoilCrop Chickpea
        layer:
          ll    kl    xf
          0.26  0.1   1
          0.26  0.1   1
          0.26  0.08  1
          0.29  0.06  1
          0.32  0.04  1
          0.31  0.02  1
          0.37  0.01  1
      SoilCrop Sorghum
        layer:
          ll    kl    xf
          0.26  0.1   1
          0.26  0.1   1
          0.35  0.1   1
          0.32  0.08  1
          0.29  0.06  1
          0.31  0.04  1
          0.31  0.02  1
      SoilCrop Fababean
        layer:
          ll    kl    xf
          0.26  0.1   1
          0.3   0.1   1
          0.42  0.08  1
          0.4   0.06  1
          0.35  0.04  1
          0.35  0.02  1
          0.38  0.01  1
    Soil LawesSoil: region=Lockyer; site=UQ, Lawes; SoilType=Prarie; nearesttown=Gatton, Q 4343; comment=oc and ph estimated; naturalvegetation=Blue Gum, Moreton Bay Ash, Tea Tree; WaterFormat=VolumetricPercent
      Water: U=6; Cona=3.5; Salb=0.13; DiffusConst=40; DiffusSlope=16; CN2Bare=73; CNRed=20; CNCov=0.8
        layer:
          thickness  bd    ll15   airdry  dul   sat   swcon
          150        1.38  0.2    0.1     0.38  0.45  0.3
          150        1.38  0.21   0.189   0.38  0.45  0.3
          300        1.28  0.2    0.2     0.44  0.49  0.3
          300        1.38  0.19   0.19    0.4   0.45  0.3
          300        1.4   0.15   0.15    0.39  0.44  0.3
          300        1.46  0.32   0.32    0.37  0.42  0.3
          300        1.47  0.335  0.329   0.34  0.42  0.3
      Nitrogen: RootCN=40; RootWT=200; SoilCN=12.5; EnrACoeff=7.4; EnrBCoeff=0.2
        layer:
          fbiom  finert  oc   ph
          0.03   0.4     1.2  7
          0.02   0.6     1.2  7
          0.01   0.8     1.2  7
          0.01   0.9     1.1  7
          0.01   0.95    0.7  7
          0.01   0.95    0.3  7
          0.01   0.95    0.3  7
      InitWater
        sw=[0.19, 0.21, 0.20, 0.19, 0.15, 0.32, 0.34]
      other
      InitNitrogen
        layer:
          no3  nh4
          6.5  0.6
          2.1  0.1
          2.1  0.1
          1.7  0.1
          1.7  0.1
          1.7  0.1
          1.7  0.1
      SoilCrop wheat
        layer:
          ll    kl    xf
          0.2   0.1   1
          0.21  0.1   1
          0.2   0.08  1
          0.19  0.06  1
          0.15  0.04  1
          0.32  0.02  1
          0.34  0.01  1
      SoilCrop Chickpea
        layer:
          ll    kl    xf
          0.2   0.1   1
          0.21  0.1   1
          0.2   0.08  1
          0.22  0.06  1
          0.22  0.04  1
          0.34  0.02  1
          0.33  0.01  1
      SoilCrop Broccoli
        layer:
          ll    xf    kl
          0.20  1.00  0.06
          0.21  1.00  0.06
          0.20  1.00  0.06
          0.19  1.00  0.06
          0.15  0.00  0.00
          0.32  0.00  0.00
          0.34  0.00  0.00
    outputfiledescription My Variables
      variables
        variables: Date, das, biomass_wt, node_no, lai, floral_initiation_das, maturity_das, stage, cumvd, tt_tot, swdef_photo, nfact_photo, temp_stress_photo, irrigation, dlt_leaf_no, dlt_node_no, final_leaf_no, emergence_das, node_no_sen, node_no_fx
      events: event=global.Daily
    outputfiledescription FinalVariables
      variables
        variables: sowing_date, dd/mm/yyyy, floral_initiation_das, maturity_das, green_biomass_wt, pod_wt, leaf_area_max
      events: event=broccoli.harvesting
    Soil DPIGatton: region=Lockyer; site=UQ, Lawes; SoilType=Prarie; nearesttown=Gatton, Q 4343; comment=oc and ph estimated; naturalvegetation=Blue Gum, Moreton Bay Ash, Tea Tree; WaterFormat=VolumetricPercent
      Water: U=6; Cona=3.5; Salb=0.13; DiffusConst=40; DiffusSlope=16; CN2Bare=90; CNRed=20; CNCov=0.8
        layer:
          thickness  bd     ll15  airdry  dul   sat   swcon
          150        1.260  0.14  0.10    0.37  0.45  0.50
          150        1.450  0.21  0.20    0.41  0.46  0.50
          300        1.270  0.30  0.20    0.40  0.45  0.50
          300        1.330  0.31  0.20    0.43  0.47  0.50
          300        1.410  0.27  0.20    0.39  0.44  0.50
          300        1.390  0.36  0.20    0.40  0.45  0.50
      Nitrogen: RootCN=40; RootWT=200; SoilCN=12.5; EnrACoeff=7.4; EnrBCoeff=0.2
        layer:
          fbiom  finert  oc    ph
          0.03   0.4     1.25  7
          0.02   0.6     1.06  7
          0.01   0.8     0.81  7
          0.01   0.9     0.70  7
          0.01   0.95    0.70  7
          0.01   0.95    0.70  7
      InitWater
        sw=[0.28, 0.35, 0.37, 0.42, 0.37, 0.36]
      other
      InitNitrogen
        layer:
          no3     nh4
          18.500  0.6
          9.200   0.1
          11.800  0.1
          11.200  0.1
          10.300  0.1
          14.000  0.1
      SoilCrop SweetCorn
        layer:
          ll    kl    xf
          0.14  0.20  1.00
          0.21  0.08  0.30
          0.30  0.08  1.00
          0.31  0.04  1.00
          0.27  0.04  1.00
          0.36  0.02  1.00
      SoilCrop Broccoli
        layer:
          ll    kl    xf
          0.14  0.05  1.00
          0.21  0.05  0.30
          0.30  0.05  1.00
          0.31  0.05  0.00
          0.27  0.04  0.00
          0.36  0.02  0.00
