folder Simulations: version=9
  simulation Centro
    metfile met: filename=C:\Program Files\Apsim52\apsim\met\sample\dalby.met
    clock
      start_date = 1/01/1988  # Select the start date of the simulation
      end_date = 30/04/1990  # Select the end date of the simulation
    summaryfile: filename=Continuous Wheat Simulation.sum
    area paddock
      registrations global
      manager
        rule Sowing rule
          condition start_of_day:
            if (paddock_is_fallow() = 1 and FallowIn <> 'yes' and (NextCrop = 0 or NextCrop = '[crop]')) then
                     if (date_within('[date1], [date2]') = 1) then
                        if (rain[[rainnumdays]] >= [raincrit] AND esw >= [esw_amount]) OR
                            ('[must_sow]' = 'yes' AND today = date('[date2]'))) THEN
                           ChooseNextCrop = 'yes'   ! for rotations
                           [crop] sow plants =[density], sowing_depth = [depth], cultivar = [cultivar], row_spacing = [row_spacing], crop_class = [class]
                        endif
                        if today = date('[date2]') then
                           ChooseNextCrop = 'yes'
                        endif
                     endif
                  endif
          category Sowing criteria
            date1 = 23-Sep  # Enter sowing window START date (dd-mmm)
            date2 = 23-Sep  # Enter sowing window END date (dd-mmm)
            must_sow = yes  # Must sow?
            raincrit = 30  # Amount of rainfall
            rainnumdays = 3  # Number of days of rainfall
            esw_amount = 200  # Enter minimum allowable available soil water (mm)
          category Sowing parameters
            crop = centro  # Enter name of crop to sow
            density = 20  # Enter sowing density (plants/m2)
            depth = 30  # Enter sowing depth (mm)
            cultivar = cavalcade  # Enter cultivar
            class = plant  # Enter crop growth class
            row_spacing = 250  # Enter row spacing (mm)
        rule Harvesting rule
          condition end_of_day:
            if [crop].stage_name = 'harvest_ripe' or [crop].plant_status = 'dead' then
                          [crop]  harvest
                          [crop]  end_crop
                       endif
          category Harvesting criteria
            crop = centro  # Enter name of crop to harvest when ripe
        rule Sowing fertiliser
          condition [modulename].[eventname]=[fertmodule] apply amount = [fert_amount_sow] (kg/ha), depth = 50 (mm), type = [fert_type_sow]
          category When should fertiliser be applied
            modulename = centro  # On which module should the event come from
            eventname = sowing  # On which event should fertiliser be applied
          category Fertiliser application details
            fertmodule = fertiliser  # Module used to apply the fertiliser
            fert_amount_sow = 0  # Amount of starter fertiliser at sowing (kg/ha)
            fert_type_sow = urea_N  # Sowing fertiliser type
      fertiliser
      surfaceom surface organic matter
        PoolName = wheat  # Organic Matter pool name
        type = wheat  # Organic Matter type
        mass = 1000.  # Initial surface residue (kg/ha)
        cnr = 80.0  # C:N ratio of initial residue
        standing_fraction = 0.0  # Fraction of residue standing
      centro
      outputfile
        variables
          variables: dd/mm/yyyy as Date, year, day, das, biomass, green_biomass, stover_wt, yield, lai, cep, esw_layr(), root_depth
        events Reporting Frequency: event=harvesting
      soil Grey Vertosol-Kupunn (Kupunn No009): state=Queensland; region=Darling Downs; nearesttown=Dalby, Q 4405; site=Kupunn; SoilType=Grey Vertosol; DataSource=CSIRO Sustainable Ecosystems, Toowoomba; naturalvegetation=Brigalow, belah, wilga; Cona=3.5; U=6; Salb=0.12; DiffusConst=40; DiffusSlope=16; CN2Bare=73; CNRed=20; CNCov=0.8; RootCN=40; RootWT=1000; SoilCN=12; EnrACoeff=7.4; EnrBCoeff=0.2
        comment=Soil naming structure: \State\Region\Classification-Local Name (Site/district and locator number); oc and ph estimated
        InitWater
          profile
            layer:
              sw     thickness
              0.210  150
              0.210  150
              0.220  300
              0.250  300
              0.270  300
              0.310  300
              0.360  300
        InitNitrogen
          profile
            layer:
              no3  nh4    thickness
              6    1      150
              5    1      150
              3    0.900  300
              2    0.700  300
              1    0.200  300
              1    0.100  300
              1    0.010  300
        profile
          layer:
            thickness  bd     ll15   airdry  dul    sat    swcon  fbiom  finert  oc     ph  ll wheat  kl wheat  xf wheat  ll chickpea  kl chickpea  xf chickpea  ll Cotton  kl Cotton  xf Cotton  ll Sorghum  kl Sorghum  xf Sorghum  ll centro  kl centro  xf centro
            150        1.400  0.210  0.110   0.390  0.440  0.300  0.040  0.400   1.240  7   0.210     0.060     1         0.210        0.060        1            0.210      0.100      1          0.210       0.070       1           0.190      0.060      1
            150        1.390  0.210  0.170   0.390  0.440  0.300  0.020  0.600   1.240  7   0.210     0.060     1         0.210        0.060        1            0.210      0.100      1          0.210       0.070       1           0.210      0.060      1
            300        1.370  0.210  0.210   0.400  0.450  0.300  0.020  0.800   1.250  7   0.250     0.060     1         0.220        0.060        1            0.220      0.100      1          0.260       0.070       1           0.250      0.060      1
            300        1.360  0.210  0.210   0.410  0.460  0.300  0.020  1       1.100  7   0.280     0.040     1         0.270        0.060        1            0.250      0.100      1          0.260       0.050       1           0.280      0.040      1
            300        1.380  0.210  0.210   0.400  0.450  0.300  0.010  1       0.710  7   0.310     0.040     1         0.290        0.060        1            0.270      0.090      1          0.280       0.050       1           0.310      0.040      1
            300        1.390  0.210  0.210   0.390  0.440  0.300  0.010  1       0.340  7   0.370     0.020     1         0.340        0.060        1            0.310      0.070      1          0.340       0.040       1           0.370      0.020      1
            300        1.420  0.210  0.210   0.380  0.430  0.300  0.010  1       0.260  7   0.380     0.020     1         0.380        0.060        1            0.360      0.050      1          0.360       0.030       1           0.380      0.020      1
