folder Simulations
  simulation Sample Rotation 1
    clock
      start_date = 1/01/1940  # Select the start date of the simulation
      end_date = 31/12/1950  # Select the end date of the simulation
    summaryfile
    metfile met: filename=C:\development\apsim\met\sample\goond.met
    area Paddock
      registrations global
      tclmanager Manager
        tclui Rotation Initialisation: initialState=WinterFallow; simpleLogging=0
          uiscript=source $apsuite/apsim/tcllink/lib/RotationInitialisationUI.tcl
          rule Sample Rotation 1 Rotation Initialisation.out - Rotation Initialisation UI1
            on init:
```
source C:/development/apsim/tcllink/lib/RotationInitialisation.tcl
set state "WinterFallow"
```
          rule Sample Rotation 1 Rotation Initialisation.out - Rotation Initialisation UI2
            on process:
```
checkSetup
doProcess
```
          rule Sample Rotation 1 Rotation Initialisation.out - Rotation Initialisation UI3
            on exit:
```
exit
```
        tclui Rotation Management: uiscript=source $apsuite/apsim/tcllink/lib/RotationsUI.tcl
          node Chickpea: desc=Chickpea
          node SummerFallow2: desc=New state
          node Wheat: desc=Wheat Crop
          node WinterFallow: desc=New state
          node Cotton: desc=A Cotton Crop
          node F1: desc=New state
          node SummerFallow1: desc=New state
          arc arc6: source=WinterFallow; target=Cotton; actions=sow_ozcot; rules=[canPlant_ozcot]
          arc arc2: source=SummerFallow1; target=WinterFallow; rules=[apsimGet day]  == 192
          arc arc7: source=F1; target=SummerFallow1; rules=[apsimGet day]  == 192
          arc arc3: source=Wheat; target=SummerFallow2
            actions=[apsimSendMessage wheat harvest, apsimSendMessage wheat end_crop]
            rules={[apsimGet wheat.stage_name] == "harvest_ripe" || [apsimGet wheat.plant_status] == "dead"}
          arc arc8: source=Chickpea; target=SummerFallow1
            actions=[apsimSendMessage chickpea harvest, apsimSendMessage chickpea end_crop]
            rules={[apsimGet chickpea.stage_name] == "harvest_ripe" || [apsimGet chickpea.plant_status] == "dead"}
          arc arc0: source=F1; target=Chickpea; actions=sow_chickpea; rules=[canPlant_chickpea]
          arc arc9: source=SummerFallow2; target=WinterFallow; rules=[apsimGet day]  == 74
          arc arc5: source=Cotton; target=F1; actions=apsimSendMessage ozcot harvest; rules=[apsimGet ozcot_status] > 0
          arc arc1: source=SummerFallow1; target=Wheat; actions=sow_wheat; rules=[canPlant_wheat]
          rule Init rule
            on init:
```
package require struct
::struct::graph stateGraph
stateGraph node insert "Chickpea"
set colour(Chickpea) "lightgreen"
stateGraph node insert "SummerFallow2"
set colour(SummerFallow2) "gray"
stateGraph node insert "Wheat"
set colour(Wheat) "darkgreen"
stateGraph node insert "WinterFallow"
set colour(WinterFallow) "gray"
stateGraph node insert "Cotton"
set colour(Cotton) "purple"
stateGraph node insert "F1"
set colour(F1) "gray"
stateGraph node insert "SummerFallow1"
set colour(SummerFallow1) "maroon"
stateGraph arc insert "WinterFallow" "Cotton" "arc6"
stateGraph arc lappend "arc6" actions {sow_ozcot}
stateGraph arc lappend "arc6" rules {[canPlant_ozcot]}
stateGraph arc lappend "arc6" actions {}
stateGraph arc insert "SummerFallow1" "WinterFallow" "arc2"
stateGraph arc lappend "arc2" rules {[apsimGet day]  == 192}
stateGraph arc lappend "arc2" actions {}
stateGraph arc insert "F1" "SummerFallow1" "arc7"
stateGraph arc lappend "arc7" rules {[apsimGet day]  == 192}
stateGraph arc lappend "arc7" actions {}
stateGraph arc insert "Wheat" "SummerFallow2" "arc3"
stateGraph arc lappend "arc3" actions {apsimSendMessage wheat harvest}
stateGraph arc lappend "arc3" actions {apsimSendMessage wheat end_crop}
stateGraph arc lappend "arc3" rules {{[apsimGet wheat.stage_name] == "harvest_ripe" || [apsimGet wheat.plant_status] == "dead"}}
stateGraph arc lappend "arc3" actions {}
stateGraph arc insert "Chickpea" "SummerFallow1" "arc8"
stateGraph arc lappend "arc8" actions {apsimSendMessage chickpea harvest}
stateGraph arc lappend "arc8" actions {apsimSendMessage chickpea end_crop}
stateGraph arc lappend "arc8" rules {{[apsimGet chickpea.stage_name] == "harvest_ripe" || [apsimGet chickpea.plant_status] == "dead"}}
stateGraph arc lappend "arc8" actions {}
stateGraph arc insert "F1" "Chickpea" "arc0"
stateGraph arc lappend "arc0" actions {sow_chickpea}
stateGraph arc lappend "arc0" rules {[canPlant_chickpea]}
stateGraph arc lappend "arc0" actions {}
stateGraph arc insert "SummerFallow2" "WinterFallow" "arc9"
stateGraph arc lappend "arc9" rules {[apsimGet day]  == 74}
stateGraph arc lappend "arc9" actions {}
stateGraph arc insert "Cotton" "F1" "arc5"
stateGraph arc lappend "arc5" actions {apsimSendMessage ozcot harvest}
stateGraph arc lappend "arc5" rules {[apsimGet ozcot_status] > 0}
stateGraph arc lappend "arc5" actions {}
stateGraph arc insert "SummerFallow1" "Wheat" "arc1"
stateGraph arc lappend "arc1" actions {sow_wheat}
stateGraph arc lappend "arc1" rules {[canPlant_wheat]}
stateGraph arc lappend "arc1" actions {}
```
        tclui Wheat Sowing Rule: uiscript=source $apsuite/apsim/tcllink/lib/GenericSowingUI.tcl; crop=wheat; criteria=variable; date1=15-may; date2=10-jul; raincrit=25; rainnumdays=3; esw_amount=50; must_sow=no; plants=100; sowing_depth=30; row_spacing=25; skipplant=0; skiprow=0; cultivar=hartog; class=plant; module=plant
          ruletemplate Sowing rule - initialisation:
            # Support procedures
            # Can we plant a crop today?
            proc canPlant_[crop] {} {
              if {"[criteria]" == "variable"} {
                 set year [apsimGet year]; set day [apsimGet day]
                 set d1 [clock format [clock scan "[date1]-$year"] -format %j]
                 set d2 [clock format [clock scan "[date2]-$year"] -format %j]

                 if {"[must_sow]" == "yes" && $day == $d2} {return 1}

                 if {$d1 > $d2} {
                    set dateOK [expr $day >= $d1 || $day <= $d2]
                 } else {
                    set dateOK [expr $day >= $d1 && $day <= $d2]
                 }
                 set rainOK [expr [apsimGet rain\[[rainnumdays]\]] >= [raincrit]]
                 set eswOK [expr [apsimGet esw] >= [esw_amount]]
                 return [expr $dateOK && $rainOK && $eswOK]
              } elseif {"[criteria]" == "fixed"} {
                 set year [apsimGet year]; set day [apsimGet day]
                 set d1 [clock format [clock scan "[date1]-$year"] -format %j]
                 return [expr $day == $d1]
              } else {
                 error "Unknown sowing criteria \"[criteria]\"."
              }
              return "notreached"
            }

            # Plant a crop now
            proc sow_[crop] {} {
              if {"[module]" == "plant"} {
                 apsimSendMessage [crop] sow {plants [plants]} {sowing_depth [sowing_depth]} \
                         {cultivar [cultivar]} {row_spacing [row_spacing]} \
                         {skipplant [skipplant]} {skiprow [skiprow]} {crop_class [class]}
              } elseif {"[module]" == "cropmod"} {
                 apsimSendMessage [crop] sow {plants [density]} {sowing_depth [depth]} \
                         {cultivar [cultivar]} {row_spacing [row_spacing]} {skiprow [skiprow]}
              } elseif {"[module]" == "growth"} {
                 apsimSendMessage [crop] ???
              } elseif {"[module]" == "ozcot"} {
                 apsimSendMessage [crop] sow {plants_pm [plants_pm]} {sowing_depth [sowing_depth]} \
                         {row_spacing [row_spacing]} {skiprow [skiprow]} {cultivar [cultivar]}
              } elseif {"[module]" == "oryza"} {
                 apsimSendMessage [crop] sow {cultivar [cultivar]}
              } elseif {"[module]" == "sorghum"} {
                 apsimSendMessage [crop] sow {plants [plants]} {sowing_depth [sowing_depth]} \
                         {cultivar [cultivar]} {row_spacing [row_spacing]} {skiprow [skiprow]} \
                         {tiller_no_fertile [tiller_no_fertile]}
              } elseif {"[module]" == "sugar"} {
                 apsimSendMessage [crop] sow {plants [plants]} {cultivar [cultivar]} {sowing_depth [sowing_depth]}
              } else {
                error "Unknown crop module \"[module]\"."
              }
            }
          rule Sample Rotation 1 Wheat Sowing Rule.out - Sowing rule - initialisation
            on init:
```
# Support procedures
# Can we plant a crop today?
proc canPlant_wheat {} {
  if {"variable" == "variable"} {
     set year [apsimGet year]; set day [apsimGet day]
     set d1 [clock format [clock scan "15-may-$year"] -format %j]
     set d2 [clock format [clock scan "10-jul-$year"] -format %j]

     if {"no" == "yes" && $day == $d2} {return 1}

     if {$d1 > $d2} {
        set dateOK [expr $day >= $d1 || $day <= $d2]
     } else {   
        set dateOK [expr $day >= $d1 && $day <= $d2]
     }
     set rainOK [expr [apsimGet rain\[3\]] >= 25]
     set eswOK [expr [apsimGet esw] >= 50]
     return [expr $dateOK && $rainOK && $eswOK]
  } elseif {"variable" == "fixed"} {
     set year [apsimGet year]; set day [apsimGet day]
     set d1 [clock format [clock scan "15-may-$year"] -format %j]
     return [expr $day == $d1]
  } else {
     error "Unknown sowing criteria \"variable\"."
  }
  return "notreached"
}

# Plant a crop now
proc sow_wheat {} {
  if {"plant" == "plant"} {
     apsimSendMessage wheat sow {plants 100} {sowing_depth 30} \
             {cultivar hartog} {row_spacing 25} \
             {skipplant 0} {skiprow 0} {crop_class plant} 
  } elseif {"plant" == "cropmod"} {
     apsimSendMessage wheat sow {plants [density]} {sowing_depth [depth]} \
             {cultivar hartog} {row_spacing 25} {skiprow 0} 
  } elseif {"plant" == "growth"} {
     apsimSendMessage wheat ???
  } elseif {"plant" == "ozcot"} {
     apsimSendMessage wheat sow {plants_pm [plants_pm]} {sowing_depth 30} \
             {row_spacing 25} {skiprow 0} {cultivar hartog}
  } elseif {"plant" == "oryza"} {
     apsimSendMessage wheat sow {cultivar hartog} 
  } elseif {"plant" == "sorghum"} {
     apsimSendMessage wheat sow {plants 100} {sowing_depth 30} \
             {cultivar hartog} {row_spacing 25} {skiprow 0} \
             {tiller_no_fertile [tiller_no_fertile]}
  } elseif {"plant" == "sugar"} {
     apsimSendMessage wheat sow {plants 100} {cultivar hartog} {sowing_depth 30}
  } else {
    error "Unknown crop module \"plant\"."
  }
}
```
        tclui Cotton Sowing Rule: uiscript=source $apsuite/apsim/tcllink/lib/GenericSowingUI.tcl; crop=ozcot; criteria=variable; date1=15-oct; date2=15-dec; raincrit=10; rainnumdays=3; esw_amount=100; must_sow=yes; plants_pm=10; sowing_depth=30; row_spacing=1000; skiprow=0; cultivar=Siok; module=ozcot; plants=100; skipplant=0; class=plant
          ruletemplate Sowing rule - initialisation:
            # Support procedures
            # Can we plant a crop today?
            proc canPlant_[crop] {} {
              if {"[criteria]" == "variable"} {
                 set year [apsimGet year]; set day [apsimGet day]
                 set d1 [clock format [clock scan "[date1]-$year"] -format %j]
                 set d2 [clock format [clock scan "[date2]-$year"] -format %j]

                 if {"[must_sow]" == "yes" && $day == $d2} {return 1}

                 if {$d1 > $d2} {
                    set dateOK [expr $day >= $d1 || $day <= $d2]
                 } else {
                    set dateOK [expr $day >= $d1 && $day <= $d2]
                 }
                 set rainOK [expr [apsimGet rain\[[rainnumdays]\]] >= [raincrit]]
                 set eswOK [expr [apsimGet esw] >= [esw_amount]]
                 return [expr $dateOK && $rainOK && $eswOK]
              } elseif {"[criteria]" == "fixed"} {
                 set year [apsimGet year]; set day [apsimGet day]
                 set d1 [clock format [clock scan "[date1]-$year"] -format %j]
                 return [expr $day == $d1]
              } else {
                 error "Unknown sowing criteria \"[criteria]\"."
              }
              return "notreached"
            }

            # Plant a crop now
            proc sow_[crop] {} {
              if {"[module]" == "plant"} {
                 apsimSendMessage [crop] sow {plants [plants]} {sowing_depth [sowing_depth]} \
                         {cultivar [cultivar]} {row_spacing [row_spacing]} \
                         {skipplant [skipplant]} {skiprow [skiprow]} {crop_class [class]}
              } elseif {"[module]" == "cropmod"} {
                 apsimSendMessage [crop] sow {plants [density]} {sowing_depth [depth]} \
                         {cultivar [cultivar]} {row_spacing [row_spacing]} {skiprow [skiprow]}
              } elseif {"[module]" == "growth"} {
                 apsimSendMessage [crop] ???
              } elseif {"[module]" == "ozcot"} {
                 apsimSendMessage [crop] sow {plants_pm [plants_pm]} {sowing_depth [sowing_depth]} \
                         {row_spacing [row_spacing]} {skiprow [skiprow]} {cultivar [cultivar]}
              } elseif {"[module]" == "oryza"} {
                 apsimSendMessage [crop] sow {cultivar [cultivar]}
              } elseif {"[module]" == "sorghum"} {
                 apsimSendMessage [crop] sow {plants [plants]} {sowing_depth [sowing_depth]} \
                         {cultivar [cultivar]} {row_spacing [row_spacing]} {skiprow [skiprow]} \
                         {tiller_no_fertile [tiller_no_fertile]}
              } elseif {"[module]" == "sugar"} {
                 apsimSendMessage [crop] sow {plants [plants]} {cultivar [cultivar]} {sowing_depth [sowing_depth]}
              } else {
                error "Unknown crop module \"[module]\"."
              }
            }
          rule Sample Rotation 1 Cotton Sowing Rule.out - Sowing rule - initialisation
            on init:
```
# Support procedures
# Can we plant a crop today?
proc canPlant_ozcot {} {
  if {"variable" == "variable"} {
     set year [apsimGet year]; set day [apsimGet day]
     set d1 [clock format [clock scan "15-oct-$year"] -format %j]
     set d2 [clock format [clock scan "15-dec-$year"] -format %j]

     if {"yes" == "yes" && $day == $d2} {return 1}

     if {$d1 > $d2} {
        set dateOK [expr $day >= $d1 || $day <= $d2]
     } else {   
        set dateOK [expr $day >= $d1 && $day <= $d2]
     }
     set rainOK [expr [apsimGet rain\[3\]] >= 10]
     set eswOK [expr [apsimGet esw] >= 100]
     return [expr $dateOK && $rainOK && $eswOK]
  } elseif {"variable" == "fixed"} {
     set year [apsimGet year]; set day [apsimGet day]
     set d1 [clock format [clock scan "15-oct-$year"] -format %j]
     return [expr $day == $d1]
  } else {
     error "Unknown sowing criteria \"variable\"."
  }
  return "notreached"
}

# Plant a crop now
proc sow_ozcot {} {
  if {"ozcot" == "plant"} {
     apsimSendMessage ozcot sow {plants 100} {sowing_depth 30} \
             {cultivar Siok} {row_spacing 1000} \
             {skipplant 0} {skiprow 0} {crop_class plant} 
  } elseif {"ozcot" == "cropmod"} {
     apsimSendMessage ozcot sow {plants [density]} {sowing_depth [depth]} \
             {cultivar Siok} {row_spacing 1000} {skiprow 0} 
  } elseif {"ozcot" == "growth"} {
     apsimSendMessage ozcot ???
  } elseif {"ozcot" == "ozcot"} {
     apsimSendMessage ozcot sow {plants_pm 10} {sowing_depth 30} \
             {row_spacing 1000} {skiprow 0} {cultivar Siok}
  } elseif {"ozcot" == "oryza"} {
     apsimSendMessage ozcot sow {cultivar Siok} 
  } elseif {"ozcot" == "sorghum"} {
     apsimSendMessage ozcot sow {plants 100} {sowing_depth 30} \
             {cultivar Siok} {row_spacing 1000} {skiprow 0} \
             {tiller_no_fertile [tiller_no_fertile]}
  } elseif {"ozcot" == "sugar"} {
     apsimSendMessage ozcot sow {plants 100} {cultivar Siok} {sowing_depth 30}
  } else {
    error "Unknown crop module \"ozcot\"."
  }
}
```
        tclui Chickpea Sowing Rule: uiscript=source $apsuite/apsim/tcllink/lib/GenericSowingUI.tcl; crop=chickpea; criteria=variable; date1=15-may; date2=10-jul; raincrit=15; rainnumdays=3; esw_amount=50; must_sow=no; plants=25; sowing_depth=30; row_spacing=25; skipplant=0; skiprow=0; cultivar=amethyst; class=plant; module=plant
          ruletemplate Sowing rule - initialisation:
            # Support procedures
            # Can we plant a crop today?
            proc canPlant_[crop] {} {
              if {"[criteria]" == "variable"} {
                 set year [apsimGet year]; set day [apsimGet day]
                 set d1 [clock format [clock scan "[date1]-$year"] -format %j]
                 set d2 [clock format [clock scan "[date2]-$year"] -format %j]

                 if {"[must_sow]" == "yes" && $day == $d2} {return 1}

                 if {$d1 > $d2} {
                    set dateOK [expr $day >= $d1 || $day <= $d2]
                 } else {
                    set dateOK [expr $day >= $d1 && $day <= $d2]
                 }
                 set rainOK [expr [apsimGet rain\[[rainnumdays]\]] >= [raincrit]]
                 set eswOK [expr [apsimGet esw] >= [esw_amount]]
                 return [expr $dateOK && $rainOK && $eswOK]
              } elseif {"[criteria]" == "fixed"} {
                 set year [apsimGet year]; set day [apsimGet day]
                 set d1 [clock format [clock scan "[date1]-$year"] -format %j]
                 return [expr $day == $d1]
              } else {
                 error "Unknown sowing criteria \"[criteria]\"."
              }
              return "notreached"
            }

            # Plant a crop now
            proc sow_[crop] {} {
              if {"[module]" == "plant"} {
                 apsimSendMessage [crop] sow {plants [plants]} {sowing_depth [sowing_depth]} \
                         {cultivar [cultivar]} {row_spacing [row_spacing]} \
                         {skipplant [skipplant]} {skiprow [skiprow]} {crop_class [class]}
              } elseif {"[module]" == "cropmod"} {
                 apsimSendMessage [crop] sow {plants [density]} {sowing_depth [depth]} \
                         {cultivar [cultivar]} {row_spacing [row_spacing]} {skiprow [skiprow]}
              } elseif {"[module]" == "growth"} {
                 apsimSendMessage [crop] ???
              } elseif {"[module]" == "ozcot"} {
                 apsimSendMessage [crop] sow {plants_pm [plants_pm]} {sowing_depth [sowing_depth]} \
                         {row_spacing [row_spacing]} {skiprow [skiprow]} {cultivar [cultivar]}
              } elseif {"[module]" == "oryza"} {
                 apsimSendMessage [crop] sow {cultivar [cultivar]}
              } elseif {"[module]" == "sorghum"} {
                 apsimSendMessage [crop] sow {plants [plants]} {sowing_depth [sowing_depth]} \
                         {cultivar [cultivar]} {row_spacing [row_spacing]} {skiprow [skiprow]} \
                         {tiller_no_fertile [tiller_no_fertile]}
              } elseif {"[module]" == "sugar"} {
                 apsimSendMessage [crop] sow {plants [plants]} {cultivar [cultivar]} {sowing_depth [sowing_depth]}
              } else {
                error "Unknown crop module \"[module]\"."
              }
            }
          rule Sample Rotation 1 Chickpea Sowing Rule.out - Sowing rule - initialisation
            on init:
```
# Support procedures
# Can we plant a crop today?
proc canPlant_chickpea {} {
  if {"variable" == "variable"} {
     set year [apsimGet year]; set day [apsimGet day]
     set d1 [clock format [clock scan "15-may-$year"] -format %j]
     set d2 [clock format [clock scan "10-jul-$year"] -format %j]

     if {"no" == "yes" && $day == $d2} {return 1}

     if {$d1 > $d2} {
        set dateOK [expr $day >= $d1 || $day <= $d2]
     } else {   
        set dateOK [expr $day >= $d1 && $day <= $d2]
     }
     set rainOK [expr [apsimGet rain\[3\]] >= 15]
     set eswOK [expr [apsimGet esw] >= 50]
     return [expr $dateOK && $rainOK && $eswOK]
  } elseif {"variable" == "fixed"} {
     set year [apsimGet year]; set day [apsimGet day]
     set d1 [clock format [clock scan "15-may-$year"] -format %j]
     return [expr $day == $d1]
  } else {
     error "Unknown sowing criteria \"variable\"."
  }
  return "notreached"
}

# Plant a crop now
proc sow_chickpea {} {
  if {"plant" == "plant"} {
     apsimSendMessage chickpea sow {plants 25} {sowing_depth 30} \
             {cultivar amethyst} {row_spacing 25} \
             {skipplant 0} {skiprow 0} {crop_class plant} 
  } elseif {"plant" == "cropmod"} {
     apsimSendMessage chickpea sow {plants [density]} {sowing_depth [depth]} \
             {cultivar amethyst} {row_spacing 25} {skiprow 0} 
  } elseif {"plant" == "growth"} {
     apsimSendMessage chickpea ???
  } elseif {"plant" == "ozcot"} {
     apsimSendMessage chickpea sow {plants_pm } {sowing_depth 30} \
             {row_spacing 25} {skiprow 0} {cultivar amethyst}
  } elseif {"plant" == "oryza"} {
     apsimSendMessage chickpea sow {cultivar amethyst} 
  } elseif {"plant" == "sorghum"} {
     apsimSendMessage chickpea sow {plants 25} {sowing_depth 30} \
             {cultivar amethyst} {row_spacing 25} {skiprow 0} \
             {tiller_no_fertile [tiller_no_fertile]}
  } elseif {"plant" == "sugar"} {
     apsimSendMessage chickpea sow {plants 25} {cultivar amethyst} {sowing_depth 30}
  } else {
    error "Unknown crop module \"plant\"."
  }
}
```
      wheat
      ozcot
      chickpea
      surfaceom surface organic matter
        PoolName = wheat_stubble  # Organic Matter pool name
        type = wheat  # Organic Matter type
        mass = 1000.  # Initial surface residue (kg/ha)
        cnr = 80.0  # C:N ration of initial residue
        standing_fraction = 0.0  # Fraction of residue standing
      outputfile
        variables
          variables: dd/mm/yyyy as Date, ozcot.yield as cotton, wheat.yield as wyield, chickpea.yield as cyield, biomass
        events Reporting Frequency: event=harvesting
      fertiliser
      soil #009 - Kupunn: Site=Kupunn; Region=South East Queensland; LocalName=Brigalow; SoilType=Grey Vertosol; NearestTown=Dalby, Q 4405; NaturalVegetation=Brigalow, belah, wilga; Cona=3.5; DiffusConst=40; DiffusSlope=16; U=6; Salb=0.13; Cn2Bare=73; CnRed=20; CnCov=0.8; CnCanopyFact=1; RootCn=40; RootWt=200; SoilCn=12.5; EnrACoeff=7.4; EnrBCoeff=0.2; Comment=oc and ph not measured
        profile
          layer:
            thickness  bd    ll15  airdry  dul   sat   sw       swcon  fbiom  finert  no3  nh4  oc    ph  ll Chickpea  kl Chickpea  xf Chickpea  ll Cotton  kl Cotton  xf Cotton  ll Sorghum  kl Sorghum  xf Sorghum  ll Wheat  kl Wheat  xf Wheat  ll ozcot  kl ozcot  xf ozcot
            150        1.4   0.21  0.105   0.39  0.44  9999.99  0.3    0.03   0.4     6.5  0.6  1.24  7   0.21         0.1          1            0.21       0.1        1          0.21        0.1         1           0.21      0.1       1         0.21      0.06      1
            150        1.39  0.21  0.189   0.39  0.44  9999.99  0.3    0.02   0.6     2.1  0.1  1.24  7   0.21         0.1          1            0.21       0.1        1          0.21        0.1         1           0.21      0.1       1         0.21      0.06      1
            300        1.37  0.22  0.22    0.4   0.45  9999.99  0.3    0.01   0.8     2.1  0.1  1.25  7   0.22         0.08         1            0.22       0.1        1          0.26        0.1         1           0.25      0.08      1         0.22      0.06      1
            300        1.36  0.25  0.25    0.41  0.46  9999.99  0.3    0.01   0.9     1.7  0.1  1.1   7   0.27         0.06         1            0.25       0.1        1          0.26        0.08        1           0.28      0.06      1         0.25      0.06      1
            300        1.38  0.27  0.27    0.4   0.45  9999.99  0.3    0.01   0.95    1.7  0.1  0.71  7   0.29         0.04         1            0.27       0.09       1          0.28        0.06        1           0.31      0.04      1         0.27      0.06      1
            300        1.39  0.31  0.31    0.39  0.44  9999.99  0.3    0.01   0.95    1.7  0.1  0.34  7   0.34         0.02         1            0.31       0.07       1          0.34        0.04        1           0.37      0.02      1         0.31      0.06      1
            300        1.42  0.36  0.36    0.38  0.43  9999.99  0.3    0.01   0.95    1.7  0.1  0.26  7   0.38         0.01         1            0.36       0.05       1          0.36        0.02        1           0.38      0.01      1         0.36      0.06      1
        InitWater
          percentmethod: percent=1; distributed=filled from top
        InitNitrogen
          profile
            layer:
              no3    nh4    thickness
              6.500  0.600  150
              2.100  0.100  150
              2.100  0.100  300
              1.700  0.100  300
              1.700  0.100  300
              1.700  0.100  300
              1.700  0.100  300
